package kokkos neigh half newton on
units lj
atom_style atomic
lattice fcc 0.8442
region box block 0 10 0 10 0 10
create_box 1 box
create_atoms 1 box
mass 1 1.0
velocity all create 1.44 87287 loop geom
include protocol.inc
run 1000
write_restart prepared.restart
